*Heading
** Job name: IN Model name:
** Generated by MisuLab for Abaqus 2023
*Preprint, echo=NO, model=NO, history=NO, contact=NO
**
** PARTS
**
*Part, name=Tool
*Node
     1, 0.0, 0.0, 0.0
     2, 0.0036560803021544247, -0.029776384549239657, 0.0
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*Element, type=C3D8RT
     1, 526, 431, 379, 380, 924, 829, 777, 778
     2, 470, 373, 375, 324, 868, 771, 773, 722
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*Node
963, 0.66, 0.66, -0.0025
*Nset, nset=Tool-use-RefPt_, internal
963,
*Nset, nset=Set-Tool, generate
   1,  962,    1
*Elset, elset=Set-Tool, generate
   1,  438,    1
*Nset, nset=Set-RP
963,
** Section: Section-Tool
*Solid Section, elset=Set-Tool, material=Carbure
1.,
*End Part
**
*Part, name=Massif
*Node
     1, -1.5, -1.5, 0.0
     2, -1.448309, -1.5, 0.0
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*Element, type=EC3D8RT
     1, 1, 2, 96, 95, 13631, 13632, 13726, 13725
     2, 2, 3, 97, 96, 13632, 13633, 13727, 13726
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*Nset, nset=Set-Massif, generate
      1,  27260,      1
*Elset, elset=Set-Massif, generate
    1,  13392,     1
*Nset, nset=Set-Material
1, 2, 3, 4, 5, 6
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*Elset, elset=Set-Material
1, 2, 3, 4, 5, 6
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** Section: Section-Massif
*Eulerian Section, elset=Set-Massif
"PH15_5_ENISE", "material_field"
*Surface, type=EULERIAN MATERIAL, name="material_field"
"material_field"
*End Part
**
**
** ASSEMBLY
**
*Assembly, name=Assembly
**
*Instance, name=Massif-1, part=Massif
*End Instance
**
*Instance, name=Tool-1, part=Tool
*End Instance
**
*Nset, nset=Set-All, instance=Massif-1, generate
     1,  27260,      1
*Nset, nset=Set-All, instance=Tool-1
 963,
*Elset, elset=Set-All, instance=Massif-1, generate
    1,  13392,     1
*Nset, nset=Set-In, instance=Massif-1
1, 95, 189, 283, 377, 471
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*Elset, elset=Set-In, instance=Massif-1
1, 94, 187, 280, 373, 466
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*Nset, nset=Set-Down, instance=Massif-1
1, 2, 3, 4, 5, 6
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*Elset, elset=Set-Down, instance=Massif-1
1, 2, 3, 4, 5, 6
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*Nset, nset=Set-zz, instance=Massif-1,generate
     1,  27260,      1
*Elset, elset=Set-zz, instance=Massif-1,generate
    1,  13392,     1
*Elset, elset=_Surf-In_S6, internal, instance=Massif-1
1, 94, 187, 280, 373, 466
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*Surface, type=ELEMENT, name=Surf-In
_Surf-In_S6, S6
*Elset, elset=_Surf-Out_S4, internal, instance=Massif-1
93, 186, 279, 372, 465, 558
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*Surface, type=ELEMENT, name=Surf-Out
_Surf-Out_S4, S4
*Elset, elset=_Surf-Top_S5, internal, instance=Massif-1
13300, 13301, 13302, 13303, 13304, 13305
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*Surface, type=ELEMENT, name=Surf-Top
_Surf-Top_S5, S5
** Constraint: Constraint-RB
*Rigid Body, ref node=Tool-1.Set-RP, elset=Tool-1.Set-Tool
*End Assembly
**
*Material, name="PH15_5_ENISE"
*Density
 0.781,   0
 0.745,   1200
*Elastic
197000,  0.272,   20
128600,  0.272,   1200
*Plastic, hardening=JOHNSON COOK
1287.775180, 704.863437, 0.548579, 0.805925, 1440, 20, ,
*Rate Dependent, type=JOHNSON COOK
0.041569, 0.001,
*Conductivity
 0.0087,   0
 0.0292,   1200
*Expansion, zero=20
 1.04e-05, 20.5
 1.45e-05, 1200.0
*Inelastic Heat Fraction
0.949853
*Specific Heat
 2.48,   0
 14.0,   1200
** Donnees wikipedia & thèse de T LEVEILLE pour linstant...
*Material, name=Carbure
*Conductivity
 0.11,
*Density
1.46,
*Elastic
620000., 0.235
*Expansion, zero=20.
 4.9e-06,
*Specific Heat
 2.88,
** INTERACTION PROPERTIES
**
*Surface Interaction, name=IntProp-1
*Friction
0.279,
*Surface Behavior, pressure-overclosure=HARD
*Contact Damping, definition=CRITICAL DAMPING FRACTION, tangent fraction=0
 0.03,
*Gap Conductance, pressure
 0.,  0.
 0.01, 0.001
*Gap Heat Generation
1., 0.85
** PHYSICAL CONSTANTS
**
*Physical Constants, absolute zero=-273.15, stefan boltzmann=5.6704e-11
**
** BOUNDARY CONDITIONS
**
**
** Name: BC-Bas Type: Velocity/Angular velocity
*Boundary, type=VELOCITY
Set-Down, 2, 2
Set-Down, 3, 3
** Name: BC-No-Mvt-zz Type: Velocity/Angular velocity
*Boundary, type=VELOCITY
Set-zz, 3, 3
** Name: BC-Tool Type: Symmetry/Antisymmetry/Encastre
*Boundary
Tool-1.Set-RP, ENCASTRE
**
** PREDEFINED FIELDS
**
** Name: PF-Temperature-Massif   Type: Temperature
*Initial Conditions, type=TEMPERATURE
Massif-1.Set-Massif, 25.
** Name: PF-Temperature-Tool   Type: Temperature
*Initial Conditions, type=TEMPERATURE
Tool-1.Set-Tool, 25.
** Name: PF-Vitesse   Type: Velocity
*Initial Conditions, type=VELOCITY
Massif-1.Set-Material, 1, 2.0
** Name: PF-Void   Type: Material assignment
*Initial Conditions, type=VOLUME FRACTION
Massif-1.Set-Material, Massif-1."material_field", 1.
**
** INTERACTIONS
**
** Interaction: Int-1
*Contact, op=NEW
*Contact Inclusions, ALL EXTERIOR
*Contact Property Assignment
 ,  , IntProp-1
** ----------------------------------------------------------------
**
** STEP: Step-1
**
*Step, name=Step-1, nlgeom=YES
*Dynamic Temperature-displacement, Explicit
, 0.84
*Bulk Viscosity
0.06, 1.2
** BOUNDARY CONDITIONS
**
** Name: BC-Temperature Type: Temperature
*Boundary
Set-In, 11, 11, 25.
** Name: BC-Vitesse Type: Velocity/Angular velocity
*Boundary, type=VELOCITY
Set-In, 1, 1, 2.0
** Name: EB-In Type: Eulerian boundary
*Eulerian Boundary, inflow=FREE, outflow=FREE
Surf-In
** Name: EB-Out Type: Eulerian boundary
*Eulerian Boundary, inflow=FREE, outflow=FREE
Surf-Out
** Name: EB-Top Type: Eulerian boundary
*Eulerian Boundary, inflow=FREE, outflow=FREE
Surf-Top
**
** OUTPUT REQUESTS
**
*Restart, write, number interval=1, time marks=NO
**
** FIELD OUTPUT: F-Output-1
**
*Output, field, number interval=100
*Node Output
COORD, V, NT
*Element Output, directions=YES
COORD, HFL, S,TEMP
**
** FIELD OUTPUT: F-Output-2-Eulerian
**
** FIELD OUTPUT: F-Output-strain
**
*Element Output, elset=MASSIF-1.SET-MASSIF, directions=YES
E, LE, NE, PE, PEEQ
*Element Output, elset=Massif-1.Set-Massif, directions=YES
EVF, SVAVG
**
** FIELD OUTPUT: F-Output-strain
**
*Element Output, elset=MASSIF-1.SET-MASSIF, directions=YES
E, LE, NE, PE, PEEQ
**
** FIELD OUTPUT: F-Output-RF
**
*Node Output, nset=Tool-1.Set-RP
RF,
**
** HISTORY OUTPUT: H-Output-1
**
*Output, history, variable=PRESELECT
*End Step
